# V1 Comparator and ADJ setpoint for LTC4419
V_TH_ADJ := 1.047 V
V_TH_CMP1 := 0.387 V
V_1ADJ := 0.85*3.3 V = 2.805 V
V_1UV := 0.7*3.3 V = 2.31 V
solve block
    # guess values
    R_3 := 1 MΩ
    R_2 := 100 kΩ
    R_1 := 100 kΩ
    # constraints
    V_TH_ADJ == V_1ADJ*(R_2 + R_1)/(R_3 + R_2 + R_1)
    V_TH_CMP1 == V_1UV*R_1/(R_3 + R_2 + R_1)
    # solver
    sol := find(R_2, R_1) = [328.255; 267.309] kΩ
end solve block
R_3 := 1 MΩ
R_2 := 324 kΩ
R_1 := 267 kΩ
# V2 Comparator and FB resistor setting for LTC4419/LTC3128
V_FB := 0.58 V
V_Holdup := 4.3 V
V_TH_CMP2 := 0.387 V
V_2UV := 2.9 V
solve block
    # guess values
    R_5 := 2.2 MΩ
    R_4A := 1 kΩ
    R_4B := 1 kΩ
    # constraints
    V_FB == V_Holdup*(R_4A + R_4B)/(R_4A + R_4B + R_5)
    V_TH_CMP2 == V_2UV*R_4B/(R_4A + R_4B + R_5)
    # solver
    sol := find(R_4A, R_4B) = [3.65035; 339.36] kΩ
end solve block
R_5 := 2.2 MΩ
R_4A := 3.65 kΩ
R_4B := 340 kΩ
# ILIM, VMAX for LTC3128
I_LIM := 3 A
R_PROG := 11000 V/I_LIM = 3.66667 kΩ
C_PROG := 1600000/R_PROG = 436.364 S  # (unit error, pF)
V_MAXV := 2.5 V
R_MAXV := (50000 1/A)*V_MAXV = 125 kΩ
# Inductor Current Rating
L := 3.3 μH
V_IN := 3.3 V
ΔI_L_BUCK := |V_Holdup*(V_IN - V_Holdup)/(V_IN*L*10^6*1.2 s^-1)| = 0.329048 A
ΔI_L_Boost := |V_IN*(V_Holdup - V_IN)/(V_Holdup*L*10^6*1.2 s^-1)| = 0.193798 A
I_PK := I_LIM + 1/2*ΔI_L_BUCK = 3.16452 A
